*HEADING
TPMS lattice volumetric mesh (C3D8 voxel) - TPMS Explorer v1.0.3
** solid voxels: voxels classified by implicit field (solid fraction 0.3148)
** units: mm, N, MPa; specimen size 2.000 mm; voxel h = 3.1250e-2 mm
**
*NODE
1, -0.18749999999999994, -1, -1
2, -0.15625000000000003, -1, -1
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*ELEMENT, TYPE=C3D8, ELSET=ESOLID
1, 1, 2, 10, 9, 1547, 1548, 1556, 1555
2, 2, 3, 11, 10, 1548, 1549, 1557, 1556
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*NSET, NSET=NSET_BOTTOM
1, 2, 3, 4, 5, 6
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*NSET, NSET=NSET_TOP
101419, 101420, 101421, 101422, 101423, 101424
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*NSET, NSET=NSET_PBC_X0
568, 633, 698, 749, 2134, 2199
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*NSET, NSET=NSET_PBC_X1
632, 697, 748, 793, 829, 2198
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*NSET, NSET=NSET_PBC_Y0
1, 2, 3, 4, 1547, 1548
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*NSET, NSET=NSET_PBC_Y1
1542, 1543, 1544, 1545, 1546, 3146
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**
** PBC usage: couple NSET_PBC_X0/X1 (and Y/Z) with *EQUATION or a submodel of periodic MPC; edge/corner masters need dedicated sets in production workflows.
*SOLID SECTION, ELSET=ESOLID, MATERIAL=TPMS_MATRIX
*MATERIAL, NAME=TPMS_MATRIX
*ELASTIC
110000, 0.34
**
** Uniaxial compression along Z (bottom fixed, top displaced)
*STEP
*STATIC
*BOUNDARY
NSET_BOTTOM, 3, 3, 0.0
NSET_TOP, 3, 3, -0.100000
*OUTPUT, FIELD
*ELEMENT OUTPUT
S, E
*NODE OUTPUT
U
*OUTPUT, HISTORY
*NODE OUTPUT, NSET=NSET_TOP
RF, U
*END STEP
